// SBML level 2 version 4

function Rate_Law_for_drug_transport(drug1_p, drug1_c, k)
  k*(drug1_p - drug1_c);
end

model PDynamics()

  // Compartments:
  compartment volume = 10; volume is "Vc";
  compartment Vp = 1;

  // Species:
  species drug1 in Vp = 0; drug1 is "drug1_p";
  species drug1_c in volume = 0;

  // Parameters:
  linear_metabolism_rate = 0.0001 unit_0; linear_metabolism_rate is "lambda";
  k = 0.0008 unit_0;

  // Reactions:
  drug_transport: drug1 -> drug1_c; volume*Rate_Law_for_drug_transport(drug1, drug1_c, k);
  drug_decay: drug1_c => ; volume*linear_metabolism_rate*drug1_c;

  // Events:
  event_0: at (time > 0): drug1_c = drug1_c + 100;
  event_1: at (time > 360): drug1_c = drug1_c + 100;
  event_2: at (time > 720): drug1_c = drug1_c + 100;
  event_3: at (time > 1080): drug1_c = drug1_c + 10;
  event_4: at (time > 1440): drug1_c = drug1_c + 10;

  // Unit definitions:
  unit length = metre;
  unit area = metre^2;
  unit volume = litre;
  unit time = 0.06 second;
  unit substance = mole;
  unit unit_0 = 1 / (0.06 second); unit_0 is "1/min";
end
